// SBML level 3 version 1

model stseranidou2024()
  // ABSTRACT:
  // Intervertebral disc degeneration (IDD) arises from an intricate imbalance between the anabolic and catabolic processes governing the extracellular matrix (ECM) within the disc. Biochemical processes are complex, redundant and feedback-looped, and improved integration of knowledge is needed. To addess this, a literature-based regulatory network model (RNM) for nucleus pulposus cells (NPC) is proposed, representing the normal state of the intervertebral disc (IVD), in which proteins are represented by nodes that interact among each other through activation and/or inhibition edges. This model includes 32 different proteins and 150 edges by incorporating critical biochemical interactions in IVD regulation, tested in vivo or vitro in humans’ and animals’ NPC, alongside non tissue specific protein-protein interactions. We used the network to calculate the dynamic regulation of each node through a semi-quantitative method. The basal steady state successfully represented the activity of a normal NPC, and the model was assessed through the published literature, by replicating two independent experimental studies in human normal NPC. Pro-catabolic or pro-anabolic shifts of the network activated by nodal perturbations could be predicted. Sensitivity analysis underscores the significant influence of transforming growth factor beta (TGF-β) and interleukin-1 receptor antagonist (IL-1Ra) on the regulation of structural proteins and degrading enzymes within the system. Given the ongoing challenge of elucidating the mechanisms driving ECM degradation in IDD, this unique IVD RNM holds promise as a tool for exploring and predicting IDD progression, shedding light on IVD phenotypes and guiding experimental research efforts.

  // Compartments:
  compartment cell = 1 dimensionless;

  // Species:
  species ACAN in cell = 0.5720224;  // substance in concentration_unit
  species COL2A in cell = 0.5989258;  // substance in concentration_unit
  species COL10A1 in cell = 0.2278876;  // substance in concentration_unit
  species COL1A in cell = 0.7273529;  // substance in concentration_unit
  species IFNgamma in cell = 0.3636848; IFNgamma is "IFN-γ";  // substance in concentration_unit
  species TNF in cell = 0.8045732;  // substance in concentration_unit
  species IL12A in cell = 0.09147963; IL12A is "IL-12A";  // substance in concentration_unit
  species IL17A in cell = 0.7866932; IL17A is "IL-17A";  // substance in concentration_unit
  species IL18 in cell = 0.4621449; IL18 is "IL-18";  // substance in concentration_unit
  species IL1alpha in cell = 0.6291617; IL1alpha is "IL-1α";  // substance in concentration_unit
  species IL1beta in cell = 0.03485143; IL1beta is "IL-1β";  // substance in concentration_unit
  species IL6 in cell = 0.4465069; IL6 is "IL-6";  // substance in concentration_unit
  species IL8 in cell = 0.8778918; IL8 is "IL-8";  // substance in concentration_unit
  species IL1RA in cell = 0.8677956; IL1RA is "IL-1RA";  // substance in concentration_unit
  species IL4 in cell = 0.6472023; IL4 is "IL-4";  // substance in concentration_unit
  species IL10 in cell = 0.5192361; IL10 is "IL-10";  // substance in concentration_unit
  species TGFbeta in cell = 0.7555916; TGFbeta is "TGF-β";  // substance in concentration_unit
  species IGF1 in cell = 0.2172252;  // substance in concentration_unit
  species CSF2 in cell = 0.2374388;  // substance in concentration_unit
  species GDF5 in cell = 0.2789663;  // substance in concentration_unit
  species PGRN in cell = 0.4343206;  // substance in concentration_unit
  species CCL in cell = 0.1672993;  // substance in concentration_unit
  species CCL22 in cell = 0.282817;  // substance in concentration_unit
  species MMP1 in cell = 0.9107156;  // substance in concentration_unit
  species MMP13 in cell = 0.9065257;  // substance in concentration_unit
  species MMP2 in cell = 0.6608307;  // substance in concentration_unit
  species MMP3 in cell = 0.3408839;  // substance in concentration_unit
  species MMP9 in cell = 0.706636;  // substance in concentration_unit
  species VEGF in cell = 0.6436352;  // substance in concentration_unit
  species ADAMTS45 in cell = 0.8724871; ADAMTS45 is "ADAMTS4/5";  // substance in concentration_unit
  species TIMP12 in cell = 0.8561889; TIMP12 is "TIMP1/2";  // substance in concentration_unit
  species TIMP3 in cell = 0.7946092;  // substance in concentration_unit

  // Parameters:
  gamma = 1;
  h = 10;

  // Reactions:
  r_ACAN: => ACAN; 1/(1 + exp(-h*(IL4/(1 + IL4) + IL10/(1 + IL10) + TGFbeta/(1 + TGFbeta) + IGF1/(1 + IGF1) + GDF5/(1 + GDF5) - TNF/(1 + TNF) + IL17A/(1 + IL17A) + IL18/(1 + IL18) + IL1beta/(1 + IL1beta) + IL6/(1 + IL6) + MMP2/(1 + MMP2)))) - gamma*ACAN;  // modifiers: IL4, IL10, TGFbeta, IGF1, GDF5, TNF, IL17A, IL18, IL1beta, IL6, MMP2
  r_COL2A: => COL2A; 1/(1 + exp(-h*(IL4/(1 + IL4) + IL10/(1 + IL10) + TGFbeta/(1 + TGFbeta) + IGF1/(1 + IGF1) + GDF5/(1 + GDF5) - TNF/(1 + TNF) + IL17A/(1 + IL17A) + IL18/(1 + IL18) + IL1beta/(1 + IL1beta) + IL6/(1 + IL6)))) - gamma*COL2A;  // modifiers: IL4, IL10, TGFbeta, IGF1, GDF5, TNF, IL17A, IL18, IL1beta, IL6
  r_COL10A1: => COL10A1; 1/(1 + exp(-h*(IL1beta/(1 + IL1beta) - IL10/(1 + IL10)))) - gamma*COL10A1;  // modifiers: IL1beta, IL10
  r_COL1A: => COL1A; 1/(1 + exp(-h*(IL1beta/(1 + IL1beta) - TNF/(1 + TNF)))) - gamma*COL1A;  // modifiers: IL1beta, TNF
  r_IFNgamma: => IFNgamma; 1/(1 + exp(-h*(IL1beta/(1 + IL1beta) - IL4/(1 + IL4)))) - gamma*IFNgamma;  // modifiers: IL1beta, IL4
  r_TNF: => TNF; 1/(1 + exp(-h*(IL17A/(1 + IL17A) + IL1beta/(1 + IL1beta) + IL6/(1 + IL6) - IL4/(1 + IL4) + IL10/(1 + IL10) + TGFbeta/(1 + TGFbeta) + GDF5/(1 + GDF5) + TIMP3/(1 + TIMP3)))) - gamma*TNF;  // modifiers: IL17A, IL1beta, IL6, IL4, IL10, TGFbeta, GDF5, TIMP3
  r_IL12A: => IL12A; 1/(1 + exp(-h*(IL17A/(1 + IL17A) - IL1beta/(1 + IL1beta) + IL4/(1 + IL4) + IL10/(1 + IL10)))) - gamma*IL12A;  // modifiers: IL17A, IL1beta, IL4, IL10
  r_IL17A: => IL17A; 1/(1 + exp(-h*(TNF/(1 + TNF) - IL1beta/(1 + IL1beta) + IL4/(1 + IL4) + IL10/(1 + IL10) + PGRN/(1 + PGRN)))) - gamma*IL17A;  // modifiers: TNF, IL1beta, IL4, IL10, PGRN
  r_IL18: => IL18; 1/(1 + exp(-h*(IL1beta/(1 + IL1beta) - IL4/(1 + IL4) + IL10/(1 + IL10)))) - gamma*IL18;  // modifiers: IL1beta, IL4, IL10
  r_IL1alpha: => IL1alpha; 1/(1 + exp(-h*(IL1beta/(1 + IL1beta) - IL4/(1 + IL4) + IL10/(1 + IL10)))) - gamma*IL1alpha;  // modifiers: IL1beta, IL4, IL10
  r_IL1beta: => IL1beta; 1/(1 + exp(-h*(TNF/(1 + TNF) + IL17A/(1 + IL17A) + IL1beta/(1 + IL1beta) - IL4/(1 + IL4) + IL10/(1 + IL10) + TGFbeta/(1 + TGFbeta) + GDF5/(1 + GDF5)))) - gamma*IL1beta;  // modifiers: TNF, IL17A, IL4, IL10, TGFbeta, GDF5
  r_IL6: => IL6; 1/(1 + exp(-h*(TNF/(1 + TNF) + IL17A/(1 + IL17A) + IL18/(1 + IL18) + IL1beta/(1 + IL1beta) + IL6/(1 + IL6) + IL8/(1 + IL8) + IL4/(1 + IL4) - IL10/(1 + IL10)))) - gamma*IL6;  // modifiers: TNF, IL17A, IL18, IL1beta, IL8, IL4, IL10
  r_IL8: => IL8; 1/(1 + exp(-h*(TNF/(1 + TNF) + IL17A/(1 + IL17A) + IL1beta/(1 + IL1beta) + IL6/(1 + IL6) - IL6/(1 + IL6) + IL4/(1 + IL4) + IL10/(1 + IL10)))) - gamma*IL8;  // modifiers: TNF, IL17A, IL1beta, IL6, IL4, IL10
  r_IL1RA: => IL1RA; 1/(1 + exp(-h*(IL1beta/(1 + IL1beta) - 0))) - gamma*IL1RA;  // modifiers: IL1beta
  r_IL4: => IL4; 1/(1 + exp(-h*(IL1beta/(1 + IL1beta) + TGFbeta/(1 + TGFbeta) - IL17A/(1 + IL17A)))) - gamma*IL4;  // modifiers: IL1beta, TGFbeta, IL17A
  r_IL10: => IL10; 1/(1 + exp(-h*(IL17A/(1 + IL17A) + IL1beta/(1 + IL1beta) + IL4/(1 + IL4) + PGRN/(1 + PGRN) - 0))) - gamma*IL10;  // modifiers: IL17A, IL1beta, IL4, PGRN
  r_TGFbeta: => TGFbeta; 1/(1 + exp(-h*(0 - TNF/(1 + TNF) + IL1beta/(1 + IL1beta)))) - gamma*TGFbeta;  // modifiers: TNF, IL1beta
  r_IGF1: => IGF1; 1/(1 + exp(-h*(IL4/(1 + IL4) - IL1beta/(1 + IL1beta) + IL6/(1 + IL6)))) - gamma*IGF1;  // modifiers: IL4, IL1beta, IL6
  r_CSF2: => CSF2; 1/(1 + exp(-h*(IL1beta/(1 + IL1beta) - IL10/(1 + IL10)))) - gamma*CSF2;  // modifiers: IL1beta, IL10
  r_GDF5: => GDF5; 1/(1 + exp(-h*(0 - IL1beta/(1 + IL1beta)))) - gamma*GDF5;  // modifiers: IL1beta
  r_PGRN: => PGRN; 1/(1 + exp(-h*(0 - 0))) - gamma*PGRN;
  r_CCL: => CCL; 1/(1 + exp(-h*(TNF/(1 + TNF) + IL17A/(1 + IL17A) + IL1beta/(1 + IL1beta) - IL4/(1 + IL4) + IL10/(1 + IL10) + TGFbeta/(1 + TGFbeta)))) - gamma*CCL;  // modifiers: TNF, IL17A, IL1beta, IL4, IL10, TGFbeta
  r_CCL22: => CCL22; 1/(1 + exp(-h*(IL4/(1 + IL4) - IL1beta/(1 + IL1beta) + IL10/(1 + IL10)))) - gamma*CCL22;  // modifiers: IL4, IL1beta, IL10
  r_MMP1: => MMP1; 1/(1 + exp(-h*(TNF/(1 + TNF) + IL17A/(1 + IL17A) + IL18/(1 + IL18) + IL1beta/(1 + IL1beta) + MMP3/(1 + MMP3) - TGFbeta/(1 + TGFbeta) + TIMP12/(1 + TIMP12)))) - gamma*MMP1;  // modifiers: TNF, IL17A, IL18, IL1beta, MMP3, TGFbeta, TIMP12
  r_MMP13: => MMP13; 1/(1 + exp(-h*(IFNgamma/(1 + IFNgamma) + TNF/(1 + TNF) + IL18/(1 + IL18) + IL1beta/(1 + IL1beta) + IL6/(1 + IL6) + IL8/(1 + IL8) - IL1RA/(1 + IL1RA) + TGFbeta/(1 + TGFbeta) + TIMP12/(1 + TIMP12)))) - gamma*MMP13;  // modifiers: IFNgamma, TNF, IL18, IL1beta, IL6, IL8, IL1RA, TGFbeta, TIMP12
  r_MMP2: => MMP2; 1/(1 + exp(-h*(IL1beta/(1 + IL1beta) + TIMP12/(1 + TIMP12) - TGFbeta/(1 + TGFbeta) + IGF1/(1 + IGF1)))) - gamma*MMP2;  // modifiers: IL1beta, TIMP12, TGFbeta, IGF1
  r_MMP3: => MMP3; 1/(1 + exp(-h*(TNF/(1 + TNF) + IL17A/(1 + IL17A) + IL18/(1 + IL18) + IL1beta/(1 + IL1beta) + IL6/(1 + IL6) - IL1RA/(1 + IL1RA) + IL4/(1 + IL4) + TGFbeta/(1 + TGFbeta) + IGF1/(1 + IGF1) + GDF5/(1 + GDF5) + TIMP12/(1 + TIMP12) + TIMP3/(1 + TIMP3)))) - gamma*MMP3;  // modifiers: TNF, IL17A, IL18, IL1beta, IL6, IL1RA, IL4, TGFbeta, IGF1, GDF5, TIMP12, TIMP3
  r_MMP9: => MMP9; 1/(1 + exp(-h*(TNF/(1 + TNF) - TGFbeta/(1 + TGFbeta) + MMP1/(1 + MMP1) + MMP2/(1 + MMP2)))) - gamma*MMP9;  // modifiers: TNF, TGFbeta, MMP1, MMP2
  r_VEGF: => VEGF; 1/(1 + exp(-h*(IL17A/(1 + IL17A) + IL1beta/(1 + IL1beta) + IL6/(1 + IL6) + MMP13/(1 + MMP13) + MMP3/(1 + MMP3) + ADAMTS45/(1 + ADAMTS45) - TIMP3/(1 + TIMP3)))) - gamma*VEGF;  // modifiers: IL17A, IL1beta, IL6, MMP13, MMP3, ADAMTS45, TIMP3
  r_ADAMTS45: => ADAMTS45; 1/(1 + exp(-h*(TNF/(1 + TNF) + IL1beta/(1 + IL1beta) + IL6/(1 + IL6) + VEGF/(1 + VEGF) - IL1RA/(1 + IL1RA) + TGFbeta/(1 + TGFbeta) + TIMP3/(1 + TIMP3)))) - gamma*ADAMTS45;  // modifiers: TNF, IL1beta, IL6, VEGF, IL1RA, TGFbeta, TIMP3
  r_TIMP12: => TIMP12; 1/(1 + exp(-h*(IL6/(1 + IL6) + IL10/(1 + IL10) + TGFbeta/(1 + TGFbeta) + IGF1/(1 + IGF1) - TNF/(1 + TNF)))) - gamma*TIMP12;  // modifiers: IL6, IL10, TGFbeta, IGF1, TNF
  r_TIMP3: => TIMP3; 1/(1 + exp(-h*(TGFbeta/(1 + TGFbeta) - IL17A/(1 + IL17A)))) - gamma*TIMP3;  // modifiers: TGFbeta, IL17A

  // Unit definitions:
  unit concentration_unit = 1e-3 mole;
  unit time_unit = second;
  unit rate_constant_unit = 1 / second;
  unit dimensionless_unit = dimensionless;
end
