// SBML level 3 version 1

model NetworkModel()

  // Compartments:
  compartment cell = 1;

  // Species:
  species ACAN in cell = 0.9983614;
  species COL2A in cell = 0.9983411;
  species COL10A1 in cell = 3.004194e-10;
  species COL1A in cell = 1.999371e-9;
  species IFN_gamma in cell = 7.262925e-11; IFN_gamma is "IFN-γ";
  species TNF in cell = 9.02613e-6;
  species IL_12A in cell = 5.95392e-9; IL_12A is "IL-12A";
  species IL_17A in cell = 2.656698e-7; IL_17A is "IL-17A";
  species IL_18 in cell = 1.241306e-10; IL_18 is "IL-18";
  species IL_1alpha in cell = 1.241306e-10; IL_1alpha is "IL-1α";
  species IL_1beta in cell = 1.483624e-8; IL_1beta is "IL-1β";
  species IL_6 in cell = 0.008661841; IL_6 is "IL-6";
  species IL_8 in cell = 0.0001202879; IL_8 is "IL-8";
  species IL_1RA in cell = 1.999407e-9; IL_1RA is "IL-1RA";
  species IL_4 in cell = 0.9298958; IL_4 is "IL-4";
  species IL_10 in cell = 0.7387459; IL_10 is "IL-10";
  species TGF_beta in cell = 0.9999991; TGF_beta is "TGF-β";
  species IGF1 in cell = 0.9957857;
  species CSF2 in cell = 3.004194e-10;
  species GDF5 in cell = 1;
  species PGRN in cell = 6.570115e-25;
  species CCL in cell = 2.517376e-8;
  species CCL22 in cell = 0.1773861;
  species MMP1 in cell = 2.954018e-9;
  species MMP13 in cell = 7.744993e-5;
  species MMP2 in cell = 3.548884e-5;
  species MMP3 in cell = 1.556724e-5;
  species MMP9 in cell = 4.054633e-7;
  species VEGF in cell = 2.292592e-11;
  species ADAMTS4_5 in cell = 8.092625e-5; ADAMTS4_5 is "ADAMTS4/5";
  species TIMP1_2 in cell = 0.9912142; TIMP1_2 is "TIMP1/2";
  species TIMP3 in cell = 0.9999999;

  // Parameters:
  gamma = 1;
  h = 10;

  // Rate rules:
  ACAN' = (-exp(0.5*h) + exp(-h*((1 + 5)/5*((IL_4 + IL_10 + TGF_beta + IGF1 + GDF5)/(1 + IL_4 + IL_10 + TGF_beta + IGF1 + GDF5))*(1 - (1 + 6)/6*((TNF + IL_17A + IL_18 + IL_1beta + IL_6 + MMP2)/(1 + TNF + IL_17A + IL_18 + IL_1beta + IL_6 + MMP2))) - 0.5)))/((1 - exp(0.5*h))*(1 + exp(-h*((1 + 5)/5*((IL_4 + IL_10 + TGF_beta + IGF1 + GDF5)/(1 + IL_4 + IL_10 + TGF_beta + IGF1 + GDF5))*(1 - (1 + 6)/6*((TNF + IL_17A + IL_18 + IL_1beta + IL_6 + MMP2)/(1 + TNF + IL_17A + IL_18 + IL_1beta + IL_6 + MMP2))) - 0.5)))) - gamma*ACAN;
  COL2A' = (-exp(0.5*h) + exp(-h*((1 + 5)/5*((IL_4 + IL_10 + TGF_beta + IGF1 + GDF5)/(1 + IL_4 + IL_10 + TGF_beta + IGF1 + GDF5))*(1 - (1 + 5)/5*((TNF + IL_17A + IL_18 + IL_1beta + IL_6)/(1 + TNF + IL_17A + IL_18 + IL_1beta + IL_6))) - 0.5)))/((1 - exp(0.5*h))*(1 + exp(-h*((1 + 5)/5*((IL_4 + IL_10 + TGF_beta + IGF1 + GDF5)/(1 + IL_4 + IL_10 + TGF_beta + IGF1 + GDF5))*(1 - (1 + 5)/5*((TNF + IL_17A + IL_18 + IL_1beta + IL_6)/(1 + TNF + IL_17A + IL_18 + IL_1beta + IL_6))) - 0.5)))) - gamma*COL2A;
  COL10A1' = (-exp(0.5*h) + exp(-h*((1 + 1)/1*(IL_1beta/(1 + IL_1beta))*(1 - (1 + 1)/1*(IL_10/(1 + IL_10))) - 0.5)))/((1 - exp(0.5*h))*(1 + exp(-h*((1 + 1)/1*(IL_1beta/(1 + IL_1beta))*(1 - (1 + 1)/1*(IL_10/(1 + IL_10))) - 0.5)))) - gamma*COL10A1;
  COL1A' = (-exp(0.5*h) + exp(-h*((1 + 1)/1*(IL_1beta/(1 + IL_1beta))*(1 - (1 + 1)/1*(TNF/(1 + TNF))) - 0.5)))/((1 - exp(0.5*h))*(1 + exp(-h*((1 + 1)/1*(IL_1beta/(1 + IL_1beta))*(1 - (1 + 1)/1*(TNF/(1 + TNF))) - 0.5)))) - gamma*COL1A;
  IFN_gamma' = (-exp(0.5*h) + exp(-h*((1 + 1)/1*(IL_1beta/(1 + IL_1beta))*(1 - (1 + 1)/1*(IL_4/(1 + IL_4))) - 0.5)))/((1 - exp(0.5*h))*(1 + exp(-h*((1 + 1)/1*(IL_1beta/(1 + IL_1beta))*(1 - (1 + 1)/1*(IL_4/(1 + IL_4))) - 0.5)))) - gamma*IFN_gamma;
  TNF' = (-exp(0.5*h) + exp(-h*((1 + 3)/3*((IL_17A + IL_1beta + IL_6)/(1 + IL_17A + IL_1beta + IL_6))*(1 - (1 + 5)/5*((IL_4 + IL_10 + TGF_beta + GDF5 + TIMP3)/(1 + IL_4 + IL_10 + TGF_beta + GDF5 + TIMP3))) - 0.5)))/((1 - exp(0.5*h))*(1 + exp(-h*((1 + 3)/3*((IL_17A + IL_1beta + IL_6)/(1 + IL_17A + IL_1beta + IL_6))*(1 - (1 + 5)/5*((IL_4 + IL_10 + TGF_beta + GDF5 + TIMP3)/(1 + IL_4 + IL_10 + TGF_beta + GDF5 + TIMP3))) - 0.5)))) - gamma*TNF;
  IL_12A' = (-exp(0.5*h) + exp(-h*((1 + 1)/1*(IL_17A/(1 + IL_17A))*(1 - (1 + 3)/3*((IL_1beta + IL_4 + IL_10)/(1 + IL_1beta + IL_4 + IL_10))) - 0.5)))/((1 - exp(0.5*h))*(1 + exp(-h*((1 + 1)/1*(IL_17A/(1 + IL_17A))*(1 - (1 + 3)/3*((IL_1beta + IL_4 + IL_10)/(1 + IL_1beta + IL_4 + IL_10))) - 0.5)))) - gamma*IL_12A;
  IL_17A' = (-exp(0.5*h) + exp(-h*((1 + 1)/1*(TNF/(1 + TNF))*(1 - (1 + 4)/4*((IL_1beta + IL_4 + IL_10 + PGRN)/(1 + IL_1beta + IL_4 + IL_10 + PGRN))) - 0.5)))/((1 - exp(0.5*h))*(1 + exp(-h*((1 + 1)/1*(TNF/(1 + TNF))*(1 - (1 + 4)/4*((IL_1beta + IL_4 + IL_10 + PGRN)/(1 + IL_1beta + IL_4 + IL_10 + PGRN))) - 0.5)))) - gamma*IL_17A;
  IL_18' = (-exp(0.5*h) + exp(-h*((1 + 1)/1*(IL_1beta/(1 + IL_1beta))*(1 - (1 + 2)/2*((IL_4 + IL_10)/(1 + IL_4 + IL_10))) - 0.5)))/((1 - exp(0.5*h))*(1 + exp(-h*((1 + 1)/1*(IL_1beta/(1 + IL_1beta))*(1 - (1 + 2)/2*((IL_4 + IL_10)/(1 + IL_4 + IL_10))) - 0.5)))) - gamma*IL_18;
  IL_1alpha' = (-exp(0.5*h) + exp(-h*((1 + 1)/1*(IL_1beta/(1 + IL_1beta))*(1 - (1 + 2)/2*((IL_4 + IL_10)/(1 + IL_4 + IL_10))) - 0.5)))/((1 - exp(0.5*h))*(1 + exp(-h*((1 + 1)/1*(IL_1beta/(1 + IL_1beta))*(1 - (1 + 2)/2*((IL_4 + IL_10)/(1 + IL_4 + IL_10))) - 0.5)))) - gamma*IL_1alpha;
  IL_1beta' = (-exp(0.5*h) + exp(-h*((1 + 3)/3*((TNF + IL_17A + IL_1beta)/(1 + TNF + IL_17A + IL_1beta))*(1 - (1 + 4)/4*((IL_4 + IL_10 + TGF_beta + GDF5)/(1 + IL_4 + IL_10 + TGF_beta + GDF5))) - 0.5)))/((1 - exp(0.5*h))*(1 + exp(-h*((1 + 3)/3*((TNF + IL_17A + IL_1beta)/(1 + TNF + IL_17A + IL_1beta))*(1 - (1 + 4)/4*((IL_4 + IL_10 + TGF_beta + GDF5)/(1 + IL_4 + IL_10 + TGF_beta + GDF5))) - 0.5)))) - gamma*IL_1beta;
  IL_6' = (-exp(0.5*h) + exp(-h*((1 + 7)/7*((TNF + IL_17A + IL_18 + IL_1beta + IL_6 + IL_8 + IL_4)/(1 + TNF + IL_17A + IL_18 + IL_1beta + IL_6 + IL_8 + IL_4))*(1 - (1 + 1)/1*(IL_10/(1 + IL_10))) - 0.5)))/((1 - exp(0.5*h))*(1 + exp(-h*((1 + 7)/7*((TNF + IL_17A + IL_18 + IL_1beta + IL_6 + IL_8 + IL_4)/(1 + TNF + IL_17A + IL_18 + IL_1beta + IL_6 + IL_8 + IL_4))*(1 - (1 + 1)/1*(IL_10/(1 + IL_10))) - 0.5)))) - gamma*IL_6;
  IL_8' = (-exp(0.5*h) + exp(-h*((1 + 4)/4*((TNF + IL_17A + IL_1beta + IL_6)/(1 + TNF + IL_17A + IL_1beta + IL_6))*(1 - (1 + 3)/3*((IL_6 + IL_4 + IL_10)/(1 + IL_6 + IL_4 + IL_10))) - 0.5)))/((1 - exp(0.5*h))*(1 + exp(-h*((1 + 4)/4*((TNF + IL_17A + IL_1beta + IL_6)/(1 + TNF + IL_17A + IL_1beta + IL_6))*(1 - (1 + 3)/3*((IL_6 + IL_4 + IL_10)/(1 + IL_6 + IL_4 + IL_10))) - 0.5)))) - gamma*IL_8;
  IL_1RA' = (-exp(0.5*h) + exp(-h*((1 + 1)/1*(IL_1beta/(1 + IL_1beta)) - 0.5)))/((1 - exp(0.5*h))*(1 + exp(-h*((1 + 1)/1*(IL_1beta/(1 + IL_1beta)) - 0.5)))) - gamma*IL_1RA;
  IL_4' = (-exp(0.5*h) + exp(-h*((1 + 2)/2*((IL_1beta + TGF_beta)/(1 + IL_1beta + TGF_beta))*(1 - (1 + 1)/1*(IL_17A/(1 + IL_17A))) - 0.5)))/((1 - exp(0.5*h))*(1 + exp(-h*((1 + 2)/2*((IL_1beta + TGF_beta)/(1 + IL_1beta + TGF_beta))*(1 - (1 + 1)/1*(IL_17A/(1 + IL_17A))) - 0.5)))) - gamma*IL_4;
  IL_10' = (-exp(0.5*h) + exp(-h*((1 + 4)/4*((IL_17A + IL_1beta + IL_4 + PGRN)/(1 + IL_17A + IL_1beta + IL_4 + PGRN)) - 0.5)))/((1 - exp(0.5*h))*(1 + exp(-h*((1 + 4)/4*((IL_17A + IL_1beta + IL_4 + PGRN)/(1 + IL_17A + IL_1beta + IL_4 + PGRN)) - 0.5)))) - gamma*IL_10;
  TGF_beta' = (-exp(0.5*h) + exp(-h*(1 - (1 + 2)/2*((TNF + IL_1beta)/(1 + TNF + IL_1beta)) - 0.5)))/((1 - exp(0.5*h))*(1 + exp(-h*(1 - (1 + 2)/2*((TNF + IL_1beta)/(1 + TNF + IL_1beta)) - 0.5)))) - gamma*TGF_beta;
  IGF1' = (-exp(0.5*h) + exp(-h*((1 + 1)/1*(IL_4/(1 + IL_4))*(1 - (1 + 2)/2*((IL_1beta + IL_6)/(1 + IL_1beta + IL_6))) - 0.5)))/((1 - exp(0.5*h))*(1 + exp(-h*((1 + 1)/1*(IL_4/(1 + IL_4))*(1 - (1 + 2)/2*((IL_1beta + IL_6)/(1 + IL_1beta + IL_6))) - 0.5)))) - gamma*IGF1;
  CSF2' = (-exp(0.5*h) + exp(-h*((1 + 1)/1*(IL_1beta/(1 + IL_1beta))*(1 - (1 + 1)/1*(IL_10/(1 + IL_10))) - 0.5)))/((1 - exp(0.5*h))*(1 + exp(-h*((1 + 1)/1*(IL_1beta/(1 + IL_1beta))*(1 - (1 + 1)/1*(IL_10/(1 + IL_10))) - 0.5)))) - gamma*CSF2;
  GDF5' = (-exp(0.5*h) + exp(-h*(1 - (1 + 1)/1*(IL_1beta/(1 + IL_1beta)) - 0.5)))/((1 - exp(0.5*h))*(1 + exp(-h*(1 - (1 + 1)/1*(IL_1beta/(1 + IL_1beta)) - 0.5)))) - gamma*GDF5;
  PGRN' = (-exp(0.5*h) + exp(-h*(0 - 0.5)))/((1 - exp(0.5*h))*(1 + exp(-h*(0 - 0.5)))) - gamma*PGRN;
  CCL' = (-exp(0.5*h) + exp(-h*((1 + 3)/3*((TNF + IL_17A + IL_1beta)/(1 + TNF + IL_17A + IL_1beta))*(1 - (1 + 3)/3*((IL_4 + IL_10 + TGF_beta)/(1 + IL_4 + IL_10 + TGF_beta))) - 0.5)))/((1 - exp(0.5*h))*(1 + exp(-h*((1 + 3)/3*((TNF + IL_17A + IL_1beta)/(1 + TNF + IL_17A + IL_1beta))*(1 - (1 + 3)/3*((IL_4 + IL_10 + TGF_beta)/(1 + IL_4 + IL_10 + TGF_beta))) - 0.5)))) - gamma*CCL;
  CCL22' = (-exp(0.5*h) + exp(-h*((1 + 1)/1*(IL_4/(1 + IL_4))*(1 - (1 + 2)/2*((IL_1beta + IL_10)/(1 + IL_1beta + IL_10))) - 0.5)))/((1 - exp(0.5*h))*(1 + exp(-h*((1 + 1)/1*(IL_4/(1 + IL_4))*(1 - (1 + 2)/2*((IL_1beta + IL_10)/(1 + IL_1beta + IL_10))) - 0.5)))) - gamma*CCL22;
  MMP1' = (-exp(0.5*h) + exp(-h*((1 + 5)/5*((TNF + IL_17A + IL_18 + IL_1beta + MMP3)/(1 + TNF + IL_17A + IL_18 + IL_1beta + MMP3))*(1 - (1 + 2)/2*((TGF_beta + TIMP1_2)/(1 + TGF_beta + TIMP1_2))) - 0.5)))/((1 - exp(0.5*h))*(1 + exp(-h*((1 + 5)/5*((TNF + IL_17A + IL_18 + IL_1beta + MMP3)/(1 + TNF + IL_17A + IL_18 + IL_1beta + MMP3))*(1 - (1 + 2)/2*((TGF_beta + TIMP1_2)/(1 + TGF_beta + TIMP1_2))) - 0.5)))) - gamma*MMP1;
  MMP13' = (-exp(0.5*h) + exp(-h*((1 + 6)/6*((IFN_gamma + TNF + IL_18 + IL_1beta + IL_6 + IL_8)/(1 + IFN_gamma + TNF + IL_18 + IL_1beta + IL_6 + IL_8))*(1 - (1 + 3)/3*((IL_1RA + TGF_beta + TIMP1_2)/(1 + IL_1RA + TGF_beta + TIMP1_2))) - 0.5)))/((1 - exp(0.5*h))*(1 + exp(-h*((1 + 6)/6*((IFN_gamma + TNF + IL_18 + IL_1beta + IL_6 + IL_8)/(1 + IFN_gamma + TNF + IL_18 + IL_1beta + IL_6 + IL_8))*(1 - (1 + 3)/3*((IL_1RA + TGF_beta + TIMP1_2)/(1 + IL_1RA + TGF_beta + TIMP1_2))) - 0.5)))) - gamma*MMP13;
  MMP2' = (-exp(0.5*h) + exp(-h*((1 + 2)/2*((IL_1beta + TIMP1_2)/(1 + IL_1beta + TIMP1_2))*(1 - (1 + 2)/2*((TGF_beta + IGF1)/(1 + TGF_beta + IGF1))) - 0.5)))/((1 - exp(0.5*h))*(1 + exp(-h*((1 + 2)/2*((IL_1beta + TIMP1_2)/(1 + IL_1beta + TIMP1_2))*(1 - (1 + 2)/2*((TGF_beta + IGF1)/(1 + TGF_beta + IGF1))) - 0.5)))) - gamma*MMP2;
  MMP3' = (-exp(0.5*h) + exp(-h*((1 + 5)/5*((TNF + IL_17A + IL_18 + IL_1beta + IL_6)/(1 + TNF + IL_17A + IL_18 + IL_1beta + IL_6))*(1 - (1 + 7)/7*((IL_1RA + IL_4 + TGF_beta + IGF1 + GDF5 + TIMP1_2 + TIMP3)/(1 + IL_1RA + IL_4 + TGF_beta + IGF1 + GDF5 + TIMP1_2 + TIMP3))) - 0.5)))/((1 - exp(0.5*h))*(1 + exp(-h*((1 + 5)/5*((TNF + IL_17A + IL_18 + IL_1beta + IL_6)/(1 + TNF + IL_17A + IL_18 + IL_1beta + IL_6))*(1 - (1 + 7)/7*((IL_1RA + IL_4 + TGF_beta + IGF1 + GDF5 + TIMP1_2 + TIMP3)/(1 + IL_1RA + IL_4 + TGF_beta + IGF1 + GDF5 + TIMP1_2 + TIMP3))) - 0.5)))) - gamma*MMP3;
  MMP9' = (-exp(0.5*h) + exp(-h*((1 + 1)/1*(TNF/(1 + TNF))*(1 - (1 + 3)/3*((TGF_beta + MMP1 + MMP2)/(1 + TGF_beta + MMP1 + MMP2))) - 0.5)))/((1 - exp(0.5*h))*(1 + exp(-h*((1 + 1)/1*(TNF/(1 + TNF))*(1 - (1 + 3)/3*((TGF_beta + MMP1 + MMP2)/(1 + TGF_beta + MMP1 + MMP2))) - 0.5)))) - gamma*MMP9;
  VEGF' = (-exp(0.5*h) + exp(-h*((1 + 6)/6*((IL_17A + IL_1beta + IL_6 + MMP13 + MMP3 + ADAMTS4_5)/(1 + IL_17A + IL_1beta + IL_6 + MMP13 + MMP3 + ADAMTS4_5))*(1 - (1 + 1)/1*(TIMP3/(1 + TIMP3))) - 0.5)))/((1 - exp(0.5*h))*(1 + exp(-h*((1 + 6)/6*((IL_17A + IL_1beta + IL_6 + MMP13 + MMP3 + ADAMTS4_5)/(1 + IL_17A + IL_1beta + IL_6 + MMP13 + MMP3 + ADAMTS4_5))*(1 - (1 + 1)/1*(TIMP3/(1 + TIMP3))) - 0.5)))) - gamma*VEGF;
  ADAMTS4_5' = (-exp(0.5*h) + exp(-h*((1 + 4)/4*((TNF + IL_1beta + IL_6 + VEGF)/(1 + TNF + IL_1beta + IL_6 + VEGF))*(1 - (1 + 3)/3*((IL_1RA + TGF_beta + TIMP3)/(1 + IL_1RA + TGF_beta + TIMP3))) - 0.5)))/((1 - exp(0.5*h))*(1 + exp(-h*((1 + 4)/4*((TNF + IL_1beta + IL_6 + VEGF)/(1 + TNF + IL_1beta + IL_6 + VEGF))*(1 - (1 + 3)/3*((IL_1RA + TGF_beta + TIMP3)/(1 + IL_1RA + TGF_beta + TIMP3))) - 0.5)))) - gamma*ADAMTS4_5;
  TIMP1_2' = (-exp(0.5*h) + exp(-h*((1 + 4)/4*((IL_6 + IL_10 + TGF_beta + IGF1)/(1 + IL_6 + IL_10 + TGF_beta + IGF1))*(1 - (1 + 1)/1*(TNF/(1 + TNF))) - 0.5)))/((1 - exp(0.5*h))*(1 + exp(-h*((1 + 4)/4*((IL_6 + IL_10 + TGF_beta + IGF1)/(1 + IL_6 + IL_10 + TGF_beta + IGF1))*(1 - (1 + 1)/1*(TNF/(1 + TNF))) - 0.5)))) - gamma*TIMP1_2;
  TIMP3' = (-exp(0.5*h) + exp(-h*((1 + 1)/1*(TGF_beta/(1 + TGF_beta))*(1 - (1 + 1)/1*(IL_17A/(1 + IL_17A))) - 0.5)))/((1 - exp(0.5*h))*(1 + exp(-h*((1 + 1)/1*(TGF_beta/(1 + TGF_beta))*(1 - (1 + 1)/1*(IL_17A/(1 + IL_17A))) - 0.5)))) - gamma*TIMP3;
end
