// SBML level 3 version 1

model NucleusPulposusModel()
  // Nucleus Pulposus Regulatory Network
  // Abstract
  // Intervertebral disc degeneration (IDD) arises from an intricate imbalance between the anabolic and catabolic processes governing the extracellular matrix (ECM) within the disc. Biochemical processes are complex, redundant and feedback-looped, thus improved integration of knowledge is needed. To address this, a literature-based regulatory network model (RNM) for nucleus pulposus cells (NPC) is proposed, representing the normal state of the intervertebral disc (IVD) cells, in which proteins are represented by nodes that interact with each other through activation and/or inhibition edges.
  // This model includes 32 different proteins and 150 edges by incorporating critical biochemical interactions in IVD regulation, tested in vivo or in vitro in human and animal NPC, alongside non-tissue-specific protein-protein interactions. We used the network to calculate the dynamic regulation of each node through a semi-quantitative method. The basal steady state successfully represented the activity of a normal NPC, and the model was assessed through the published literature, by replicating two independent experimental studies in human normal NPC.
  // Pro-catabolic or pro-anabolic shifts of the network activated by nodal perturbations could be predicted. Sensitivity analysis underscored the significant influence of transforming growth factor beta (TGF-β) and interleukin-1 receptor antagonist (IL-1Ra) on the regulation of structural proteins and degrading enzymes within the system. Given the ongoing challenge of elucidating the mechanisms that drive ECM degradation in IDD, this unique IVD RNM holds promise as a tool for exploring and predicting IDD progression, shedding light on IVD phenotypes and guiding experimental research efforts.

  // Compartments:
  compartment cell = 1 liter; cell is "Nucleus Pulposus Cell";

  // Species:
  species ACAN in cell = 0.3745401;  // substance in molar
  species COL1A in cell = 0.9507143;  // substance in molar
  species COL2A in cell = 0.7319939;  // substance in molar
  species COL10A1 in cell = 0.5986585;  // substance in molar
  species IFN_gamma in cell = 0.1560186; IFN_gamma is "IFN-γ";  // substance in molar
  species TNF in cell = 0.1559945;  // substance in molar
  species IL_1alpha in cell = 0.05808361; IL_1alpha is "IL-1α";  // substance in molar
  species IL_1beta in cell = 0.8661761; IL_1beta is "IL-1β";  // substance in molar
  species IL_6 in cell = 0.601115; IL_6 is "IL-6";  // substance in molar
  species IL_8 in cell = 0.7080726; IL_8 is "IL-8";  // substance in molar
  species IL_12A in cell = 0.02058449; IL_12A is "IL-12A";  // substance in molar
  species IL_17A in cell = 0.9699099; IL_17A is "IL-17A";  // substance in molar
  species IL_18 in cell = 0.8324426; IL_18 is "IL-18";  // substance in molar
  species IL_1RA in cell = 0.2123391; IL_1RA is "IL-1RA";  // substance in molar
  species IL_4 in cell = 0.181825; IL_4 is "IL-4";  // substance in molar
  species IL_10 in cell = 0.1834045; IL_10 is "IL-10";  // substance in molar
  species CCL in cell = 0.3042422;  // substance in molar
  species CCL22 in cell = 0.5247564;  // substance in molar
  species TGF_beta in cell = 0.431945; TGF_beta is "TGF-β";  // substance in molar
  species CCN2 in cell = 0.2912291;  // substance in molar
  species IGF1 in cell = 0.6118529;  // substance in molar
  species CSF2 in cell = 0.1394939;  // substance in molar
  species GDF5 in cell = 0.2921446;  // substance in molar
  species PGRN in cell = 0.3663618;  // substance in molar
  species MMP1 in cell = 0.45607;  // substance in molar
  species MMP2 in cell = 0.785176;  // substance in molar
  species MMP3 in cell = 0.1996738;  // substance in molar
  species MMP9 in cell = 0.5142344;  // substance in molar
  species MMP13 in cell = 0.5924146;  // substance in molar
  species ADAMTS4_5 in cell = 0.04645041; ADAMTS4_5 is "ADAMTS4/5";  // substance in molar
  species TIMP1_2 in cell = 0.6075449; TIMP1_2 is "TIMP1/2";  // substance in molar
  species TIMP3 in cell = 0.1705241;  // substance in molar
  species VEGF in cell = 0.06505159;  // substance in molar

  // Parameters:
  gamma = 1 second;
  h = 10 dimensionless;

  // Rate rules:
  ACAN' = (-exp(0.5*h) + exp(-h*((1 + 5)/5*((IL_4 + IL_10 + TGF_beta + IGF1 + GDF5)/(1 + IL_4 + IL_10 + TGF_beta + IGF1 + GDF5))*(1 - (1 + 6)/6*((TNF + IL_1beta + IL_6 + IL_17A + IL_18 + MMP2)/(1 + TNF + IL_1beta + IL_6 + IL_17A + IL_18 + MMP2))) - 0.5)))/((1 - exp(0.5*h))*(1 + exp(-h*((1 + 5)/5*((IL_4 + IL_10 + TGF_beta + IGF1 + GDF5)/(1 + IL_4 + IL_10 + TGF_beta + IGF1 + GDF5))*(1 - (1 + 6)/6*((TNF + IL_1beta + IL_6 + IL_17A + IL_18 + MMP2)/(1 + TNF + IL_1beta + IL_6 + IL_17A + IL_18 + MMP2))) - 0.5)))) - gamma*ACAN;
  COL1A' = (-exp(0.5*h) + exp(-h*((1 + 1)/1*(IL_1beta/(1 + IL_1beta))*(1 - (1 + 1)/1*(TNF/(1 + TNF))) - 0.5)))/((1 - exp(0.5*h))*(1 + exp(-h*((1 + 1)/1*(IL_1beta/(1 + IL_1beta))*(1 - (1 + 1)/1*(TNF/(1 + TNF))) - 0.5)))) - gamma*COL1A;
  COL2A' = (-exp(0.5*h) + exp(-h*((1 + 5)/5*((IL_4 + IL_10 + TGF_beta + IGF1 + GDF5)/(1 + IL_4 + IL_10 + TGF_beta + IGF1 + GDF5))*(1 - (1 + 5)/5*((TNF + IL_1beta + IL_6 + IL_17A + IL_18)/(1 + TNF + IL_1beta + IL_6 + IL_17A + IL_18))) - 0.5)))/((1 - exp(0.5*h))*(1 + exp(-h*((1 + 5)/5*((IL_4 + IL_10 + TGF_beta + IGF1 + GDF5)/(1 + IL_4 + IL_10 + TGF_beta + IGF1 + GDF5))*(1 - (1 + 5)/5*((TNF + IL_1beta + IL_6 + IL_17A + IL_18)/(1 + TNF + IL_1beta + IL_6 + IL_17A + IL_18))) - 0.5)))) - gamma*COL2A;
  COL10A1' = (-exp(0.5*h) + exp(-h*((1 + 1)/1*(IL_1beta/(1 + IL_1beta))*(1 - (1 + 1)/1*(IL_10/(1 + IL_10))) - 0.5)))/((1 - exp(0.5*h))*(1 + exp(-h*((1 + 1)/1*(IL_1beta/(1 + IL_1beta))*(1 - (1 + 1)/1*(IL_10/(1 + IL_10))) - 0.5)))) - gamma*COL10A1;
  IFN_gamma' = (-exp(0.5*h) + exp(-h*((1 + 1)/1*(IL_1beta/(1 + IL_1beta))*(1 - (1 + 1)/1*(IL_4/(1 + IL_4))) - 0.5)))/((1 - exp(0.5*h))*(1 + exp(-h*((1 + 1)/1*(IL_1beta/(1 + IL_1beta))*(1 - (1 + 1)/1*(IL_4/(1 + IL_4))) - 0.5)))) - gamma*IFN_gamma;
  TNF' = (-exp(0.5*h) + exp(-h*((1 + 3)/3*((IL_1beta + IL_6 + IL_17A)/(1 + IL_1beta + IL_6 + IL_17A))*(1 - (1 + 5)/5*((IL_4 + IL_10 + TGF_beta + GDF5 + TIMP3)/(1 + IL_4 + IL_10 + TGF_beta + GDF5 + TIMP3))) - 0.5)))/((1 - exp(0.5*h))*(1 + exp(-h*((1 + 3)/3*((IL_1beta + IL_6 + IL_17A)/(1 + IL_1beta + IL_6 + IL_17A))*(1 - (1 + 5)/5*((IL_4 + IL_10 + TGF_beta + GDF5 + TIMP3)/(1 + IL_4 + IL_10 + TGF_beta + GDF5 + TIMP3))) - 0.5)))) - gamma*TNF;
  IL_1alpha' = (-exp(0.5*h) + exp(-h*((1 + 1)/1*(IL_1beta/(1 + IL_1beta))*(1 - (1 + 2)/2*((IL_4 + IL_10)/(1 + IL_4 + IL_10))) - 0.5)))/((1 - exp(0.5*h))*(1 + exp(-h*((1 + 1)/1*(IL_1beta/(1 + IL_1beta))*(1 - (1 + 2)/2*((IL_4 + IL_10)/(1 + IL_4 + IL_10))) - 0.5)))) - gamma*IL_1alpha;
  IL_1beta' = (-exp(0.5*h) + exp(-h*((1 + 3)/3*((TNF + IL_1beta + IL_17A)/(1 + TNF + IL_1beta + IL_17A))*(1 - (1 + 4)/4*((IL_4 + IL_10 + TGF_beta + GDF5)/(1 + IL_4 + IL_10 + TGF_beta + GDF5))) - 0.5)))/((1 - exp(0.5*h))*(1 + exp(-h*((1 + 3)/3*((TNF + IL_1beta + IL_17A)/(1 + TNF + IL_1beta + IL_17A))*(1 - (1 + 4)/4*((IL_4 + IL_10 + TGF_beta + GDF5)/(1 + IL_4 + IL_10 + TGF_beta + GDF5))) - 0.5)))) - gamma*IL_1beta;
  IL_6' = (-exp(0.5*h) + exp(-h*((1 + 7)/7*((TNF + IL_1beta + IL_6 + IL_8 + IL_17A + IL_18 + IL_4)/(1 + TNF + IL_1beta + IL_6 + IL_8 + IL_17A + IL_18 + IL_4))*(1 - (1 + 1)/1*(IL_10/(1 + IL_10))) - 0.5)))/((1 - exp(0.5*h))*(1 + exp(-h*((1 + 7)/7*((TNF + IL_1beta + IL_6 + IL_8 + IL_17A + IL_18 + IL_4)/(1 + TNF + IL_1beta + IL_6 + IL_8 + IL_17A + IL_18 + IL_4))*(1 - (1 + 1)/1*(IL_10/(1 + IL_10))) - 0.5)))) - gamma*IL_6;
  IL_8' = (-exp(0.5*h) + exp(-h*((1 + 4)/4*((TNF + IL_1beta + IL_6 + IL_17A)/(1 + TNF + IL_1beta + IL_6 + IL_17A))*(1 - (1 + 3)/3*((IL_6 + IL_4 + IL_10)/(1 + IL_6 + IL_4 + IL_10))) - 0.5)))/((1 - exp(0.5*h))*(1 + exp(-h*((1 + 4)/4*((TNF + IL_1beta + IL_6 + IL_17A)/(1 + TNF + IL_1beta + IL_6 + IL_17A))*(1 - (1 + 3)/3*((IL_6 + IL_4 + IL_10)/(1 + IL_6 + IL_4 + IL_10))) - 0.5)))) - gamma*IL_8;
  IL_12A' = (-exp(0.5*h) + exp(-h*((1 + 1)/1*(IL_17A/(1 + IL_17A))*(1 - (1 + 3)/3*((IL_1beta + IL_4 + IL_10)/(1 + IL_1beta + IL_4 + IL_10))) - 0.5)))/((1 - exp(0.5*h))*(1 + exp(-h*((1 + 1)/1*(IL_17A/(1 + IL_17A))*(1 - (1 + 3)/3*((IL_1beta + IL_4 + IL_10)/(1 + IL_1beta + IL_4 + IL_10))) - 0.5)))) - gamma*IL_12A;
  IL_17A' = (-exp(0.5*h) + exp(-h*((1 + 1)/1*(TNF/(1 + TNF))*(1 - (1 + 4)/4*((IL_1beta + IL_4 + IL_10 + PGRN)/(1 + IL_1beta + IL_4 + IL_10 + PGRN))) - 0.5)))/((1 - exp(0.5*h))*(1 + exp(-h*((1 + 1)/1*(TNF/(1 + TNF))*(1 - (1 + 4)/4*((IL_1beta + IL_4 + IL_10 + PGRN)/(1 + IL_1beta + IL_4 + IL_10 + PGRN))) - 0.5)))) - gamma*IL_17A;
  IL_18' = (-exp(0.5*h) + exp(-h*((1 + 1)/1*(IL_1beta/(1 + IL_1beta))*(1 - (1 + 2)/2*((IL_4 + IL_10)/(1 + IL_4 + IL_10))) - 0.5)))/((1 - exp(0.5*h))*(1 + exp(-h*((1 + 1)/1*(IL_1beta/(1 + IL_1beta))*(1 - (1 + 2)/2*((IL_4 + IL_10)/(1 + IL_4 + IL_10))) - 0.5)))) - gamma*IL_18;
  IL_1RA' = (-exp(0.5*h) + exp(-h*((1 + 1)/1*(IL_1beta/(1 + IL_1beta)) - 0.5)))/((1 - exp(0.5*h))*(1 + exp(-h*((1 + 1)/1*(IL_1beta/(1 + IL_1beta)) - 0.5)))) - gamma*IL_1RA;
  IL_4' = (-exp(0.5*h) + exp(-h*((1 + 2)/2*((IL_1beta + TGF_beta)/(1 + IL_1beta + TGF_beta))*(1 - (1 + 1)/1*(IL_17A/(1 + IL_17A))) - 0.5)))/((1 - exp(0.5*h))*(1 + exp(-h*((1 + 2)/2*((IL_1beta + TGF_beta)/(1 + IL_1beta + TGF_beta))*(1 - (1 + 1)/1*(IL_17A/(1 + IL_17A))) - 0.5)))) - gamma*IL_4;
  IL_10' = (-exp(0.5*h) + exp(-h*((1 + 4)/4*((IL_1beta + IL_17A + IL_4 + PGRN)/(1 + IL_1beta + IL_17A + IL_4 + PGRN)) - 0.5)))/((1 - exp(0.5*h))*(1 + exp(-h*((1 + 4)/4*((IL_1beta + IL_17A + IL_4 + PGRN)/(1 + IL_1beta + IL_17A + IL_4 + PGRN)) - 0.5)))) - gamma*IL_10;
  CCL' = (-exp(0.5*h) + exp(-h*((1 + 3)/3*((TNF + IL_1beta + IL_17A)/(1 + TNF + IL_1beta + IL_17A))*(1 - (1 + 3)/3*((IL_4 + IL_10 + TGF_beta)/(1 + IL_4 + IL_10 + TGF_beta))) - 0.5)))/((1 - exp(0.5*h))*(1 + exp(-h*((1 + 3)/3*((TNF + IL_1beta + IL_17A)/(1 + TNF + IL_1beta + IL_17A))*(1 - (1 + 3)/3*((IL_4 + IL_10 + TGF_beta)/(1 + IL_4 + IL_10 + TGF_beta))) - 0.5)))) - gamma*CCL;
  CCL22' = (-exp(0.5*h) + exp(-h*((1 + 1)/1*(IL_4/(1 + IL_4))*(1 - (1 + 2)/2*((IL_1beta + IL_10)/(1 + IL_1beta + IL_10))) - 0.5)))/((1 - exp(0.5*h))*(1 + exp(-h*((1 + 1)/1*(IL_4/(1 + IL_4))*(1 - (1 + 2)/2*((IL_1beta + IL_10)/(1 + IL_1beta + IL_10))) - 0.5)))) - gamma*CCL22;
  TGF_beta' = (-exp(0.5*h) + exp(-h*(1 - (1 + 2)/2*((TNF + IL_1beta)/(1 + TNF + IL_1beta)) - 0.5)))/((1 - exp(0.5*h))*(1 + exp(-h*(1 - (1 + 2)/2*((TNF + IL_1beta)/(1 + TNF + IL_1beta)) - 0.5)))) - gamma*TGF_beta;
  CCN2' = (-exp(0.5*h) + exp(-h*((1 + 1)/1*(TGF_beta/(1 + TGF_beta)) - 0.5)))/((1 - exp(0.5*h))*(1 + exp(-h*((1 + 1)/1*(TGF_beta/(1 + TGF_beta)) - 0.5)))) - gamma*CCN2;
  IGF1' = (-exp(0.5*h) + exp(-h*((1 + 1)/1*(IL_4/(1 + IL_4))*(1 - (1 + 2)/2*((IL_1beta + IL_6)/(1 + IL_1beta + IL_6))) - 0.5)))/((1 - exp(0.5*h))*(1 + exp(-h*((1 + 1)/1*(IL_4/(1 + IL_4))*(1 - (1 + 2)/2*((IL_1beta + IL_6)/(1 + IL_1beta + IL_6))) - 0.5)))) - gamma*IGF1;
  CSF2' = (-exp(0.5*h) + exp(-h*((1 + 1)/1*(IL_1beta/(1 + IL_1beta))*(1 - (1 + 1)/1*(IL_10/(1 + IL_10))) - 0.5)))/((1 - exp(0.5*h))*(1 + exp(-h*((1 + 1)/1*(IL_1beta/(1 + IL_1beta))*(1 - (1 + 1)/1*(IL_10/(1 + IL_10))) - 0.5)))) - gamma*CSF2;
  GDF5' = (-exp(0.5*h) + exp(-h*(1 - (1 + 1)/1*(IL_1beta/(1 + IL_1beta)) - 0.5)))/((1 - exp(0.5*h))*(1 + exp(-h*(1 - (1 + 1)/1*(IL_1beta/(1 + IL_1beta)) - 0.5)))) - gamma*GDF5;
  PGRN' = (-exp(0.5*h) + exp(-h*(0 - 0.5)))/((1 - exp(0.5*h))*(1 + exp(-h*(0 - 0.5)))) - gamma*PGRN;
  MMP1' = (-exp(0.5*h) + exp(-h*((1 + 5)/5*((TNF + IL_1beta + IL_17A + IL_18 + MMP3)/(1 + TNF + IL_1beta + IL_17A + IL_18 + MMP3))*(1 - (1 + 2)/2*((TGF_beta + TIMP1_2)/(1 + TGF_beta + TIMP1_2))) - 0.5)))/((1 - exp(0.5*h))*(1 + exp(-h*((1 + 5)/5*((TNF + IL_1beta + IL_17A + IL_18 + MMP3)/(1 + TNF + IL_1beta + IL_17A + IL_18 + MMP3))*(1 - (1 + 2)/2*((TGF_beta + TIMP1_2)/(1 + TGF_beta + TIMP1_2))) - 0.5)))) - gamma*MMP1;
  MMP2' = (-exp(0.5*h) + exp(-h*((1 + 2)/2*((IL_1beta + TIMP1_2)/(1 + IL_1beta + TIMP1_2))*(1 - (1 + 2)/2*((TGF_beta + IGF1)/(1 + TGF_beta + IGF1))) - 0.5)))/((1 - exp(0.5*h))*(1 + exp(-h*((1 + 2)/2*((IL_1beta + TIMP1_2)/(1 + IL_1beta + TIMP1_2))*(1 - (1 + 2)/2*((TGF_beta + IGF1)/(1 + TGF_beta + IGF1))) - 0.5)))) - gamma*MMP2;
  MMP3' = (-exp(0.5*h) + exp(-h*((1 + 5)/5*((TNF + IL_1beta + IL_6 + IL_17A + IL_18)/(1 + TNF + IL_1beta + IL_6 + IL_17A + IL_18))*(1 - (1 + 8)/8*((IL_1RA + IL_4 + TGF_beta + CCN2 + IGF1 + GDF5 + TIMP1_2 + TIMP3)/(1 + IL_1RA + IL_4 + TGF_beta + CCN2 + IGF1 + GDF5 + TIMP1_2 + TIMP3))) - 0.5)))/((1 - exp(0.5*h))*(1 + exp(-h*((1 + 5)/5*((TNF + IL_1beta + IL_6 + IL_17A + IL_18)/(1 + TNF + IL_1beta + IL_6 + IL_17A + IL_18))*(1 - (1 + 8)/8*((IL_1RA + IL_4 + TGF_beta + CCN2 + IGF1 + GDF5 + TIMP1_2 + TIMP3)/(1 + IL_1RA + IL_4 + TGF_beta + CCN2 + IGF1 + GDF5 + TIMP1_2 + TIMP3))) - 0.5)))) - gamma*MMP3;
  MMP9' = (-exp(0.5*h) + exp(-h*((1 + 3)/3*((TNF + MMP1 + MMP2)/(1 + TNF + MMP1 + MMP2))*(1 - (1 + 1)/1*(TGF_beta/(1 + TGF_beta))) - 0.5)))/((1 - exp(0.5*h))*(1 + exp(-h*((1 + 3)/3*((TNF + MMP1 + MMP2)/(1 + TNF + MMP1 + MMP2))*(1 - (1 + 1)/1*(TGF_beta/(1 + TGF_beta))) - 0.5)))) - gamma*MMP9;
  MMP13' = (-exp(0.5*h) + exp(-h*((1 + 6)/6*((IFN_gamma + TNF + IL_1beta + IL_6 + IL_8 + IL_18)/(1 + IFN_gamma + TNF + IL_1beta + IL_6 + IL_8 + IL_18))*(1 - (1 + 4)/4*((IL_1RA + TGF_beta + CCN2 + TIMP1_2)/(1 + IL_1RA + TGF_beta + CCN2 + TIMP1_2))) - 0.5)))/((1 - exp(0.5*h))*(1 + exp(-h*((1 + 6)/6*((IFN_gamma + TNF + IL_1beta + IL_6 + IL_8 + IL_18)/(1 + IFN_gamma + TNF + IL_1beta + IL_6 + IL_8 + IL_18))*(1 - (1 + 4)/4*((IL_1RA + TGF_beta + CCN2 + TIMP1_2)/(1 + IL_1RA + TGF_beta + CCN2 + TIMP1_2))) - 0.5)))) - gamma*MMP13;
  ADAMTS4_5' = (-exp(0.5*h) + exp(-h*((1 + 4)/4*((TNF + IL_1beta + IL_6 + VEGF)/(1 + TNF + IL_1beta + IL_6 + VEGF))*(1 - (1 + 3)/3*((IL_1RA + TGF_beta + TIMP3)/(1 + IL_1RA + TGF_beta + TIMP3))) - 0.5)))/((1 - exp(0.5*h))*(1 + exp(-h*((1 + 4)/4*((TNF + IL_1beta + IL_6 + VEGF)/(1 + TNF + IL_1beta + IL_6 + VEGF))*(1 - (1 + 3)/3*((IL_1RA + TGF_beta + TIMP3)/(1 + IL_1RA + TGF_beta + TIMP3))) - 0.5)))) - gamma*ADAMTS4_5;
  TIMP1_2' = (-exp(0.5*h) + exp(-h*((1 + 4)/4*((IL_6 + IL_10 + TGF_beta + IGF1)/(1 + IL_6 + IL_10 + TGF_beta + IGF1))*(1 - (1 + 1)/1*(TNF/(1 + TNF))) - 0.5)))/((1 - exp(0.5*h))*(1 + exp(-h*((1 + 4)/4*((IL_6 + IL_10 + TGF_beta + IGF1)/(1 + IL_6 + IL_10 + TGF_beta + IGF1))*(1 - (1 + 1)/1*(TNF/(1 + TNF))) - 0.5)))) - gamma*TIMP1_2;
  TIMP3' = (-exp(0.5*h) + exp(-h*((1 + 1)/1*(TGF_beta/(1 + TGF_beta))*(1 - (1 + 1)/1*(IL_17A/(1 + IL_17A))) - 0.5)))/((1 - exp(0.5*h))*(1 + exp(-h*((1 + 1)/1*(TGF_beta/(1 + TGF_beta))*(1 - (1 + 1)/1*(IL_17A/(1 + IL_17A))) - 0.5)))) - gamma*TIMP3;
  VEGF' = (-exp(0.5*h) + exp(-h*((1 + 6)/6*((IL_1beta + IL_6 + IL_17A + MMP3 + MMP13 + ADAMTS4_5)/(1 + IL_1beta + IL_6 + IL_17A + MMP3 + MMP13 + ADAMTS4_5))*(1 - (1 + 1)/1*(TIMP3/(1 + TIMP3))) - 0.5)))/((1 - exp(0.5*h))*(1 + exp(-h*((1 + 6)/6*((IL_1beta + IL_6 + IL_17A + MMP3 + MMP13 + ADAMTS4_5)/(1 + IL_1beta + IL_6 + IL_17A + MMP3 + MMP13 + ADAMTS4_5))*(1 - (1 + 1)/1*(TIMP3/(1 + TIMP3))) - 0.5)))) - gamma*VEGF;

  // Reactions:
  r_ACAN: => ACAN; -exp(0.5*h) + exp(-h*((IL_4/(1 + IL_4) + IL_10/(1 + IL_10) + TGF_beta/(1 + TGF_beta) + IGF1/(1 + IGF1) + GDF5/(1 + GDF5))*(1 - (TNF/(1 + TNF) + IL_1beta/(1 + IL_1beta) + IL_6/(1 + IL_6) + IL_17A/(1 + IL_17A) + IL_18/(1 + IL_18) + MMP2/(1 + MMP2))) - 0.5))/(1 - exp(0.5*h) + 1 + exp(-h*((IL_4/(1 + IL_4) + IL_10/(1 + IL_10) + TGF_beta/(1 + TGF_beta) + IGF1/(1 + IGF1) + GDF5/(1 + GDF5))*(1 - (TNF/(1 + TNF) + IL_1beta/(1 + IL_1beta) + IL_6/(1 + IL_6) + IL_17A/(1 + IL_17A) + IL_18/(1 + IL_18) + MMP2/(1 + MMP2))) - 0.5))) - gamma*ACAN; r_ACAN is "Regulation of ACAN";  // modifiers: IL_4, IL_10, TGF_beta, IGF1, GDF5, TNF, IL_1beta, IL_6, IL_17A, IL_18, MMP2
  r_COL1A: => COL1A; -exp(0.5*h) + exp(-h*(IL_1beta/(1 + IL_1beta)*(1 - TNF/(1 + TNF)) - 0.5))/(1 - exp(0.5*h) + 1 + exp(-h*(IL_1beta/(1 + IL_1beta)*(1 - TNF/(1 + TNF)) - 0.5))) - gamma*COL1A; r_COL1A is "Regulation of COL1A";  // modifiers: IL_1beta, TNF
  r_COL2A: => COL2A; -exp(0.5*h) + exp(-h*((IL_4/(1 + IL_4) + IL_10/(1 + IL_10) + TGF_beta/(1 + TGF_beta) + IGF1/(1 + IGF1) + GDF5/(1 + GDF5))*(1 - (TNF/(1 + TNF) + IL_1beta/(1 + IL_1beta) + IL_6/(1 + IL_6) + IL_17A/(1 + IL_17A) + IL_18/(1 + IL_18))) - 0.5))/(1 - exp(0.5*h) + 1 + exp(-h*((IL_4/(1 + IL_4) + IL_10/(1 + IL_10) + TGF_beta/(1 + TGF_beta) + IGF1/(1 + IGF1) + GDF5/(1 + GDF5))*(1 - (TNF/(1 + TNF) + IL_1beta/(1 + IL_1beta) + IL_6/(1 + IL_6) + IL_17A/(1 + IL_17A) + IL_18/(1 + IL_18))) - 0.5))) - gamma*COL2A; r_COL2A is "Regulation of COL2A";  // modifiers: IL_4, IL_10, TGF_beta, IGF1, GDF5, TNF, IL_1beta, IL_6, IL_17A, IL_18
  r_COL10A1: => COL10A1; -exp(0.5*h) + exp(-h*(IL_1beta/(1 + IL_1beta)*(1 - IL_10/(1 + IL_10)) - 0.5))/(1 - exp(0.5*h) + 1 + exp(-h*(IL_1beta/(1 + IL_1beta)*(1 - IL_10/(1 + IL_10)) - 0.5))) - gamma*COL10A1; r_COL10A1 is "Regulation of COL10A1";  // modifiers: IL_1beta, IL_10
  r_IFN_gamma: => IFN_gamma; -exp(0.5*h) + exp(-h*(IL_1beta/(1 + IL_1beta)*(1 - IL_4/(1 + IL_4)) - 0.5))/(1 - exp(0.5*h) + 1 + exp(-h*(IL_1beta/(1 + IL_1beta)*(1 - IL_4/(1 + IL_4)) - 0.5))) - gamma*IFN_gamma; r_IFN_gamma is "Regulation of IFN-γ";  // modifiers: IL_1beta, IL_4
  r_TNF: => TNF; -exp(0.5*h) + exp(-h*((IL_1beta/(1 + IL_1beta) + IL_6/(1 + IL_6) + IL_17A/(1 + IL_17A))*(1 - (IL_4/(1 + IL_4) + IL_10/(1 + IL_10) + TGF_beta/(1 + TGF_beta) + GDF5/(1 + GDF5) + TIMP3/(1 + TIMP3))) - 0.5))/(1 - exp(0.5*h) + 1 + exp(-h*((IL_1beta/(1 + IL_1beta) + IL_6/(1 + IL_6) + IL_17A/(1 + IL_17A))*(1 - (IL_4/(1 + IL_4) + IL_10/(1 + IL_10) + TGF_beta/(1 + TGF_beta) + GDF5/(1 + GDF5) + TIMP3/(1 + TIMP3))) - 0.5))) - gamma*TNF; r_TNF is "Regulation of TNF";  // modifiers: IL_1beta, IL_6, IL_17A, IL_4, IL_10, TGF_beta, GDF5, TIMP3
  r_IL_1alpha: => IL_1alpha; -exp(0.5*h) + exp(-h*(IL_1beta/(1 + IL_1beta)*(1 - (IL_4/(1 + IL_4) + IL_10/(1 + IL_10))) - 0.5))/(1 - exp(0.5*h) + 1 + exp(-h*(IL_1beta/(1 + IL_1beta)*(1 - (IL_4/(1 + IL_4) + IL_10/(1 + IL_10))) - 0.5))) - gamma*IL_1alpha; r_IL_1alpha is "Regulation of IL-1α";  // modifiers: IL_1beta, IL_4, IL_10
  r_IL_1beta: => IL_1beta; -exp(0.5*h) + exp(-h*((TNF/(1 + TNF) + IL_1beta/(1 + IL_1beta) + IL_17A/(1 + IL_17A))*(1 - (IL_4/(1 + IL_4) + IL_10/(1 + IL_10) + TGF_beta/(1 + TGF_beta) + GDF5/(1 + GDF5))) - 0.5))/(1 - exp(0.5*h) + 1 + exp(-h*((TNF/(1 + TNF) + IL_1beta/(1 + IL_1beta) + IL_17A/(1 + IL_17A))*(1 - (IL_4/(1 + IL_4) + IL_10/(1 + IL_10) + TGF_beta/(1 + TGF_beta) + GDF5/(1 + GDF5))) - 0.5))) - gamma*IL_1beta; r_IL_1beta is "Regulation of IL-1β";  // modifiers: TNF, IL_17A, IL_4, IL_10, TGF_beta, GDF5
  r_IL_6: => IL_6; -exp(0.5*h) + exp(-h*((TNF/(1 + TNF) + IL_1beta/(1 + IL_1beta) + IL_6/(1 + IL_6) + IL_8/(1 + IL_8) + IL_17A/(1 + IL_17A) + IL_18/(1 + IL_18) + IL_4/(1 + IL_4))*(1 - IL_10/(1 + IL_10)) - 0.5))/(1 - exp(0.5*h) + 1 + exp(-h*((TNF/(1 + TNF) + IL_1beta/(1 + IL_1beta) + IL_6/(1 + IL_6) + IL_8/(1 + IL_8) + IL_17A/(1 + IL_17A) + IL_18/(1 + IL_18) + IL_4/(1 + IL_4))*(1 - IL_10/(1 + IL_10)) - 0.5))) - gamma*IL_6; r_IL_6 is "Regulation of IL-6";  // modifiers: TNF, IL_1beta, IL_8, IL_17A, IL_18, IL_4, IL_10
  r_IL_8: => IL_8; -exp(0.5*h) + exp(-h*((TNF/(1 + TNF) + IL_1beta/(1 + IL_1beta) + IL_6/(1 + IL_6) + IL_17A/(1 + IL_17A))*(1 - (IL_6/(1 + IL_6) + IL_4/(1 + IL_4) + IL_10/(1 + IL_10))) - 0.5))/(1 - exp(0.5*h) + 1 + exp(-h*((TNF/(1 + TNF) + IL_1beta/(1 + IL_1beta) + IL_6/(1 + IL_6) + IL_17A/(1 + IL_17A))*(1 - (IL_6/(1 + IL_6) + IL_4/(1 + IL_4) + IL_10/(1 + IL_10))) - 0.5))) - gamma*IL_8; r_IL_8 is "Regulation of IL-8";  // modifiers: TNF, IL_1beta, IL_6, IL_17A, IL_4, IL_10
  r_IL_12A: => IL_12A; -exp(0.5*h) + exp(-h*(IL_17A/(1 + IL_17A)*(1 - (IL_1beta/(1 + IL_1beta) + IL_4/(1 + IL_4) + IL_10/(1 + IL_10))) - 0.5))/(1 - exp(0.5*h) + 1 + exp(-h*(IL_17A/(1 + IL_17A)*(1 - (IL_1beta/(1 + IL_1beta) + IL_4/(1 + IL_4) + IL_10/(1 + IL_10))) - 0.5))) - gamma*IL_12A; r_IL_12A is "Regulation of IL-12A";  // modifiers: IL_17A, IL_1beta, IL_4, IL_10
  r_IL_17A: => IL_17A; -exp(0.5*h) + exp(-h*(TNF/(1 + TNF)*(1 - (IL_1beta/(1 + IL_1beta) + IL_4/(1 + IL_4) + IL_10/(1 + IL_10) + PGRN/(1 + PGRN))) - 0.5))/(1 - exp(0.5*h) + 1 + exp(-h*(TNF/(1 + TNF)*(1 - (IL_1beta/(1 + IL_1beta) + IL_4/(1 + IL_4) + IL_10/(1 + IL_10) + PGRN/(1 + PGRN))) - 0.5))) - gamma*IL_17A; r_IL_17A is "Regulation of IL-17A";  // modifiers: TNF, IL_1beta, IL_4, IL_10, PGRN
  r_IL_18: => IL_18; -exp(0.5*h) + exp(-h*(IL_1beta/(1 + IL_1beta)*(1 - (IL_4/(1 + IL_4) + IL_10/(1 + IL_10))) - 0.5))/(1 - exp(0.5*h) + 1 + exp(-h*(IL_1beta/(1 + IL_1beta)*(1 - (IL_4/(1 + IL_4) + IL_10/(1 + IL_10))) - 0.5))) - gamma*IL_18; r_IL_18 is "Regulation of IL-18";  // modifiers: IL_1beta, IL_4, IL_10
  r_IL_1RA: => IL_1RA; -exp(0.5*h) + exp(-h*(IL_1beta/(1 + IL_1beta) - 0.5))/(1 - exp(0.5*h) + 1 + exp(-h*(IL_1beta/(1 + IL_1beta) - 0.5))) - gamma*IL_1RA; r_IL_1RA is "Regulation of IL-1RA";  // modifiers: IL_1beta
  r_IL_4: => IL_4; -exp(0.5*h) + exp(-h*((IL_1beta/(1 + IL_1beta) + TGF_beta/(1 + TGF_beta))*(1 - IL_17A/(1 + IL_17A)) - 0.5))/(1 - exp(0.5*h) + 1 + exp(-h*((IL_1beta/(1 + IL_1beta) + TGF_beta/(1 + TGF_beta))*(1 - IL_17A/(1 + IL_17A)) - 0.5))) - gamma*IL_4; r_IL_4 is "Regulation of IL-4";  // modifiers: IL_1beta, TGF_beta, IL_17A
  r_IL_10: => IL_10; -exp(0.5*h) + exp(-h*(IL_1beta/(1 + IL_1beta) + IL_17A/(1 + IL_17A) + IL_4/(1 + IL_4) + PGRN/(1 + PGRN) - 0.5))/(1 - exp(0.5*h) + 1 + exp(-h*(IL_1beta/(1 + IL_1beta) + IL_17A/(1 + IL_17A) + IL_4/(1 + IL_4) + PGRN/(1 + PGRN) - 0.5))) - gamma*IL_10; r_IL_10 is "Regulation of IL-10";  // modifiers: IL_1beta, IL_17A, IL_4, PGRN
  r_CCL: => CCL; -exp(0.5*h) + exp(-h*((TNF/(1 + TNF) + IL_1beta/(1 + IL_1beta) + IL_17A/(1 + IL_17A))*(1 - (IL_4/(1 + IL_4) + IL_10/(1 + IL_10) + TGF_beta/(1 + TGF_beta))) - 0.5))/(1 - exp(0.5*h) + 1 + exp(-h*((TNF/(1 + TNF) + IL_1beta/(1 + IL_1beta) + IL_17A/(1 + IL_17A))*(1 - (IL_4/(1 + IL_4) + IL_10/(1 + IL_10) + TGF_beta/(1 + TGF_beta))) - 0.5))) - gamma*CCL; r_CCL is "Regulation of CCL";  // modifiers: TNF, IL_1beta, IL_17A, IL_4, IL_10, TGF_beta
  r_CCL22: => CCL22; -exp(0.5*h) + exp(-h*(IL_4/(1 + IL_4)*(1 - (IL_1beta/(1 + IL_1beta) + IL_10/(1 + IL_10))) - 0.5))/(1 - exp(0.5*h) + 1 + exp(-h*(IL_4/(1 + IL_4)*(1 - (IL_1beta/(1 + IL_1beta) + IL_10/(1 + IL_10))) - 0.5))) - gamma*CCL22; r_CCL22 is "Regulation of CCL22";  // modifiers: IL_4, IL_1beta, IL_10
  r_TGF_beta: => TGF_beta; -exp(0.5*h) + exp(-h*(1 - (TNF/(1 + TNF) + IL_1beta/(1 + IL_1beta)) - 0.5))/(1 - exp(0.5*h) + 1 + exp(-h*(1 - (TNF/(1 + TNF) + IL_1beta/(1 + IL_1beta)) - 0.5))) - gamma*TGF_beta; r_TGF_beta is "Regulation of TGF-β";  // modifiers: TNF, IL_1beta
  r_CCN2: => CCN2; -exp(0.5*h) + exp(-h*(TGF_beta/(1 + TGF_beta) - 0.5))/(1 - exp(0.5*h) + 1 + exp(-h*(TGF_beta/(1 + TGF_beta) - 0.5))) - gamma*CCN2; r_CCN2 is "Regulation of CCN2";  // modifiers: TGF_beta
  r_IGF1: => IGF1; -exp(0.5*h) + exp(-h*(IL_4/(1 + IL_4)*(1 - (IL_1beta/(1 + IL_1beta) + IL_6/(1 + IL_6))) - 0.5))/(1 - exp(0.5*h) + 1 + exp(-h*(IL_4/(1 + IL_4)*(1 - (IL_1beta/(1 + IL_1beta) + IL_6/(1 + IL_6))) - 0.5))) - gamma*IGF1; r_IGF1 is "Regulation of IGF1";  // modifiers: IL_4, IL_1beta, IL_6
  r_CSF2: => CSF2; -exp(0.5*h) + exp(-h*(IL_1beta/(1 + IL_1beta)*(1 - IL_10/(1 + IL_10)) - 0.5))/(1 - exp(0.5*h) + 1 + exp(-h*(IL_1beta/(1 + IL_1beta)*(1 - IL_10/(1 + IL_10)) - 0.5))) - gamma*CSF2; r_CSF2 is "Regulation of CSF2";  // modifiers: IL_1beta, IL_10
  r_GDF5: => GDF5; -exp(0.5*h) + exp(-h*(1 - IL_1beta/(1 + IL_1beta) - 0.5))/(1 - exp(0.5*h) + 1 + exp(-h*(1 - IL_1beta/(1 + IL_1beta) - 0.5))) - gamma*GDF5; r_GDF5 is "Regulation of GDF5";  // modifiers: IL_1beta
  r_PGRN: => PGRN; -exp(0.5*h) + exp(-h*(0 - 0.5))/(1 - exp(0.5*h) + 1 + exp(-h*(0 - 0.5))) - gamma*PGRN; r_PGRN is "Regulation of PGRN";
  r_MMP1: => MMP1; -exp(0.5*h) + exp(-h*((TNF/(1 + TNF) + IL_1beta/(1 + IL_1beta) + IL_17A/(1 + IL_17A) + IL_18/(1 + IL_18) + MMP3/(1 + MMP3))*(1 - (TGF_beta/(1 + TGF_beta) + TIMP1_2/(1 + TIMP1_2))) - 0.5))/(1 - exp(0.5*h) + 1 + exp(-h*((TNF/(1 + TNF) + IL_1beta/(1 + IL_1beta) + IL_17A/(1 + IL_17A) + IL_18/(1 + IL_18) + MMP3/(1 + MMP3))*(1 - (TGF_beta/(1 + TGF_beta) + TIMP1_2/(1 + TIMP1_2))) - 0.5))) - gamma*MMP1; r_MMP1 is "Regulation of MMP1";  // modifiers: TNF, IL_1beta, IL_17A, IL_18, MMP3, TGF_beta, TIMP1_2
  r_MMP2: => MMP2; -exp(0.5*h) + exp(-h*((IL_1beta/(1 + IL_1beta) + TIMP1_2/(1 + TIMP1_2))*(1 - (TGF_beta/(1 + TGF_beta) + IGF1/(1 + IGF1))) - 0.5))/(1 - exp(0.5*h) + 1 + exp(-h*((IL_1beta/(1 + IL_1beta) + TIMP1_2/(1 + TIMP1_2))*(1 - (TGF_beta/(1 + TGF_beta) + IGF1/(1 + IGF1))) - 0.5))) - gamma*MMP2; r_MMP2 is "Regulation of MMP2";  // modifiers: IL_1beta, TIMP1_2, TGF_beta, IGF1
  r_MMP3: => MMP3; -exp(0.5*h) + exp(-h*((TNF/(1 + TNF) + IL_1beta/(1 + IL_1beta) + IL_6/(1 + IL_6) + IL_17A/(1 + IL_17A) + IL_18/(1 + IL_18))*(1 - (IL_1RA/(1 + IL_1RA) + IL_4/(1 + IL_4) + TGF_beta/(1 + TGF_beta) + CCN2/(1 + CCN2) + IGF1/(1 + IGF1) + GDF5/(1 + GDF5) + TIMP1_2/(1 + TIMP1_2) + TIMP3/(1 + TIMP3))) - 0.5))/(1 - exp(0.5*h) + 1 + exp(-h*((TNF/(1 + TNF) + IL_1beta/(1 + IL_1beta) + IL_6/(1 + IL_6) + IL_17A/(1 + IL_17A) + IL_18/(1 + IL_18))*(1 - (IL_1RA/(1 + IL_1RA) + IL_4/(1 + IL_4) + TGF_beta/(1 + TGF_beta) + CCN2/(1 + CCN2) + IGF1/(1 + IGF1) + GDF5/(1 + GDF5) + TIMP1_2/(1 + TIMP1_2) + TIMP3/(1 + TIMP3))) - 0.5))) - gamma*MMP3; r_MMP3 is "Regulation of MMP3";  // modifiers: TNF, IL_1beta, IL_6, IL_17A, IL_18, IL_1RA, IL_4, TGF_beta, CCN2, IGF1, GDF5, TIMP1_2, TIMP3
  r_MMP9: => MMP9; -exp(0.5*h) + exp(-h*((TNF/(1 + TNF) + MMP1/(1 + MMP1) + MMP2/(1 + MMP2))*(1 - TGF_beta/(1 + TGF_beta)) - 0.5))/(1 - exp(0.5*h) + 1 + exp(-h*((TNF/(1 + TNF) + MMP1/(1 + MMP1) + MMP2/(1 + MMP2))*(1 - TGF_beta/(1 + TGF_beta)) - 0.5))) - gamma*MMP9; r_MMP9 is "Regulation of MMP9";  // modifiers: TNF, MMP1, MMP2, TGF_beta
  r_MMP13: => MMP13; -exp(0.5*h) + exp(-h*((IFN_gamma/(1 + IFN_gamma) + TNF/(1 + TNF) + IL_1beta/(1 + IL_1beta) + IL_6/(1 + IL_6) + IL_8/(1 + IL_8) + IL_18/(1 + IL_18))*(1 - (IL_1RA/(1 + IL_1RA) + TGF_beta/(1 + TGF_beta) + CCN2/(1 + CCN2) + TIMP1_2/(1 + TIMP1_2))) - 0.5))/(1 - exp(0.5*h) + 1 + exp(-h*((IFN_gamma/(1 + IFN_gamma) + TNF/(1 + TNF) + IL_1beta/(1 + IL_1beta) + IL_6/(1 + IL_6) + IL_8/(1 + IL_8) + IL_18/(1 + IL_18))*(1 - (IL_1RA/(1 + IL_1RA) + TGF_beta/(1 + TGF_beta) + CCN2/(1 + CCN2) + TIMP1_2/(1 + TIMP1_2))) - 0.5))) - gamma*MMP13; r_MMP13 is "Regulation of MMP13";  // modifiers: IFN_gamma, TNF, IL_1beta, IL_6, IL_8, IL_18, IL_1RA, TGF_beta, CCN2, TIMP1_2
  r_ADAMTS4_5: => ADAMTS4_5; -exp(0.5*h) + exp(-h*((TNF/(1 + TNF) + IL_1beta/(1 + IL_1beta) + IL_6/(1 + IL_6) + VEGF/(1 + VEGF))*(1 - (IL_1RA/(1 + IL_1RA) + TGF_beta/(1 + TGF_beta) + TIMP3/(1 + TIMP3))) - 0.5))/(1 - exp(0.5*h) + 1 + exp(-h*((TNF/(1 + TNF) + IL_1beta/(1 + IL_1beta) + IL_6/(1 + IL_6) + VEGF/(1 + VEGF))*(1 - (IL_1RA/(1 + IL_1RA) + TGF_beta/(1 + TGF_beta) + TIMP3/(1 + TIMP3))) - 0.5))) - gamma*ADAMTS4_5; r_ADAMTS4_5 is "Regulation of ADAMTS4/5";  // modifiers: TNF, IL_1beta, IL_6, VEGF, IL_1RA, TGF_beta, TIMP3
  r_TIMP1_2: => TIMP1_2; -exp(0.5*h) + exp(-h*((IL_6/(1 + IL_6) + IL_10/(1 + IL_10) + TGF_beta/(1 + TGF_beta) + IGF1/(1 + IGF1))*(1 - TNF/(1 + TNF)) - 0.5))/(1 - exp(0.5*h) + 1 + exp(-h*((IL_6/(1 + IL_6) + IL_10/(1 + IL_10) + TGF_beta/(1 + TGF_beta) + IGF1/(1 + IGF1))*(1 - TNF/(1 + TNF)) - 0.5))) - gamma*TIMP1_2; r_TIMP1_2 is "Regulation of TIMP1/2";  // modifiers: IL_6, IL_10, TGF_beta, IGF1, TNF
  r_TIMP3: => TIMP3; -exp(0.5*h) + exp(-h*(TGF_beta/(1 + TGF_beta)*(1 - IL_17A/(1 + IL_17A)) - 0.5))/(1 - exp(0.5*h) + 1 + exp(-h*(TGF_beta/(1 + TGF_beta)*(1 - IL_17A/(1 + IL_17A)) - 0.5))) - gamma*TIMP3; r_TIMP3 is "Regulation of TIMP3";  // modifiers: TGF_beta, IL_17A
  r_VEGF: => VEGF; -exp(0.5*h) + exp(-h*((IL_1beta/(1 + IL_1beta) + IL_6/(1 + IL_6) + IL_17A/(1 + IL_17A) + MMP3/(1 + MMP3) + MMP13/(1 + MMP13) + ADAMTS4_5/(1 + ADAMTS4_5))*(1 - TIMP3/(1 + TIMP3)) - 0.5))/(1 - exp(0.5*h) + 1 + exp(-h*((IL_1beta/(1 + IL_1beta) + IL_6/(1 + IL_6) + IL_17A/(1 + IL_17A) + MMP3/(1 + MMP3) + MMP13/(1 + MMP13) + ADAMTS4_5/(1 + ADAMTS4_5))*(1 - TIMP3/(1 + TIMP3)) - 0.5))) - gamma*VEGF; r_VEGF is "Regulation of VEGF";  // modifiers: IL_1beta, IL_6, IL_17A, MMP3, MMP13, ADAMTS4_5, TIMP3

  // Unit definitions:
  unit mole = mole;
  unit liter = litre;
  unit second = second;
  unit molar = mole / litre;
end
